R := [
    663530; 460020; 323260; 230050; 165640; 120720; 88852; 66115; 49644; 37645
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]
T := [
    -55; -50; -45; -40; -35; -30; -25; -20; -15; -10
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]
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LSB := (3.34*(R + 1000)/(33000 + R + 1000))*4096/3.05
LSB = [
    4273.25; 4185.83; 4071.14; 3924.88; 3744.02; 3528.76; 3280.59; 3006.96; 2715.81; 2419.44
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]
3.3*(R + 1000)/(33000 + R + 1000) = [
    3.14388; 3.07956; 2.99518; 2.88758; 2.75452; 2.59615; 2.41357; 2.21225; 1.99805; 1.78001
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]
T = [
    -55; -50; -45; -40; -35; -30; -25; -20; -15; -10
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]
R = [
    663530; 460020; 323260; 230050; 165640; 120720; 88852; 66115; 49644; 37645
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]
4096/1239 = 3.30589
1.224*4096/1239 = 4.04641
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Code := 1292
Тemperature(Code) :=
    kr ←
        for i ∈ 36 .. 0
            i if Code ≥ LSB[i]
    k ← (T[kr] - T[kr - 1])/(LSB[kr] - LSB[kr - 1])
    m ← T[kr] - k*LSB[kr]
    T ← k*Code + m
Тemperature(Code) = 11.9982
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# Расчет источника электропитания
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I_ст_min := 5 mA
U_C_max := 250 V
U_C_min := 185 V
U_exit := 15 V
I_н_max := 35 mA
I_н_min := 10 mA
U_пул := 0.1 V
k := 3500*ohm*μF
k_п := 5000 ohm*μF
C1 := k*(I_ст_min + I_н_max)/(U_C_min - U_exit)
C1 = 0.823529 μF
C1 := 0.430*μF
I_ст_max := (U_C_max - 0.7*U_exit)*C1/k - I_н_min
I_ст_max = 19.4243 mA
20*10^-3*15 = 0.3
C_2 := k_п*I_н_max/(2*U_пул)
C_2 = 875 μF
