R := [
    663530; 460020; 323260; 230050; 165640; 120720; 88852; 66115; 49644; 37645
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]*Ω
T := [
    -55; -50; -45; -40; -35; -30; -25; -20; -15; -10
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]
R2 := [
    663530; 460020; 323260; 234787; 168515; 122422; 89953; 66766; 50066; 37906
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]*Ω
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U_пит := 3.3 V
R_д := 33 kΩ
D := 1024
U_оп := 3.3 V
R_з := 1 kΩ
6*k8
LSB := (U_пит*(R + R_з)/(R_д + R + R_з))*D/U_оп
LSB2 := (U_пит*(R2 + R_з)/(R_д + R2 + R_з))*D/U_оп
LSB = [
    975.555; 955.598; 929.413; 896.024; 854.735; 805.593; 748.937; 686.468; 620.002; 552.341
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]
U_пит*(R + R_з)/(R_д + R + R_з) = [
    3.14388; 3.07956; 2.99518; 2.88758; 2.75452; 2.59615; 2.41357; 2.21225; 1.99805; 1.78001
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] V
U_пит*(R2 + R_з)/(R_д + R2 + R_з) = [
    3.14388; 3.07956; 2.99518; 2.89485; 2.76226; 2.60381; 2.42144; 2.21928; 2.00459; 1.78552
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] V
T = [
    -55; -50; -45; -40; -35; -30; -25; -20; -15; -10
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]
LSB = [
    975.555; 955.598; 929.413; 896.024; 854.735; 805.593; 748.937; 686.468; 620.002; 552.341
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]
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Code := 386
Тemperature(Code) :=
    kr ←
        for i ∈ 36 .. 0
            i if Code ≥ LSB[i]
    k ← (T[kr] - T[kr - 1])/(LSB[kr] - LSB[kr - 1])
    m ← T[kr] - k*LSB[kr]
    T ← k*Code + m
Тemperature(Code) = 3.17561
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# Расчет источника электропитания
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I_ст_min := 5 mA
U_C_max := 240 V
U_C_min := 195 V
U_exit := 24 V
I_н_max := 50 mA
I_н_min := 2 mA
U_пул := 0.2 V
k := 3500*ohm*μF
k_п := 5000 ohm*μF
C1 := k*(I_ст_min + I_н_max)/(U_C_min - U_exit)
C1 = 1.12573 μF
I_ст_max := (U_C_max - 0.7*U_exit)*C1/k - I_н_min
I_ст_max = 69.7895 mA
C_2 := k_п*I_н_max/(2*U_пул)
C_2 = 625 μF
